// SBML level 2 version 3

model Step4_3()

  // Compartments:
  compartment cell = 1;

  // Species:
  species EGF_egfr in cell = 680/cell; EGF_egfr is "EGF(egfr)";
  species EGFR_egf_egfr_grb2_p_0_plcg_shc in cell = 100/cell; EGFR_egf_egfr_grb2_p_0_plcg_shc is "EGFR(egf,egfr,grb2,p~0,plcg,shc)";
  species Shc_egfr_grb2_p_0 in cell = 150/cell; Shc_egfr_grb2_p_0 is "Shc(egfr,grb2,p~0)";
  species Grb2_egfr_shc_sos in cell = 85/cell; Grb2_egfr_shc_sos is "Grb2(egfr,shc,sos)";
  species SOS_grb2 in cell = 34/cell; SOS_grb2 is "SOS(grb2)";
  species PLCg_egfr_p_0_p_i_0 in cell = 105/cell; PLCg_egfr_p_0_p_i_0 is "PLCg(egfr,p~0,p_i~0)";
  species S7 in cell = 0; S7 is "EGF(egfr!1).EGFR(egf!1,egfr,grb2,p~0,plcg,shc)";
  species S8 in cell = 0; S8 is "EGFR(egf,egfr!1,grb2,p~0,plcg,shc).EGFR(egf,egfr!1,grb2,p~0,plcg,shc)";
  species S9 in cell = 0; S9 is "EGF(egfr!1).EGFR(egf!1,egfr,grb2,p~P,plcg,shc)";
  species S10 in cell = 0; S10 is "EGF(egfr!1).EGFR(egf!1,egfr,grb2,p~P,plcg,shc!2).Shc(egfr!2,grb2,p~0)";
  species S11 in cell = 0; S11 is "EGF(egfr!1).EGFR(egf!1,egfr,grb2!2,p~P,plcg,shc).Grb2(egfr!2,shc,sos)";
  species S12 in cell = 0; S12 is "EGF(egfr!1).EGFR(egf!1,egfr,grb2,p~P,plcg!2,shc).PLCg(egfr!2,p~0,p_i~0)";
  species S13 in cell = 0; S13 is "EGF(egfr!1).EGFR(egf!1,egfr,grb2,p~0,plcg,shc!2).Shc(egfr!2,grb2,p~P)";
  species S14 in cell = 0; S14 is "EGF(egfr!1).EGFR(egf!1,egfr,grb2!2,p~P,plcg,shc).Grb2(egfr!2,shc,sos!3).SOS(grb2!3)";
  species S15 in cell = 0; S15 is "EGF(egfr!1).EGFR(egf!1,egfr,grb2,p~P,plcg!2,shc).PLCg(egfr!2,p~P,p_i~0)";
  species Shc_egfr_grb2_p_P in cell = 0; Shc_egfr_grb2_p_P is "Shc(egfr,grb2,p~P)";
  species Grb2_egfr_shc_sos_1_SOS_grb2_1 in cell = 0; Grb2_egfr_shc_sos_1_SOS_grb2_1 is "Grb2(egfr,shc,sos!1).SOS(grb2!1)";
  species PLCg_egfr_p_P_p_i_0 in cell = 0; PLCg_egfr_p_P_p_i_0 is "PLCg(egfr,p~P,p_i~0)";
  species S19 in cell = 0; S19 is "EGF(egfr!1).EGFR(egf!1,egfr,grb2,p~P,plcg,shc!2).Shc(egfr!2,grb2,p~P)";
  species S20 in cell = 0; S20 is "Grb2(egfr,shc!1,sos).Shc(egfr,grb2!1,p~P)";
  species S21 in cell = 0; S21 is "Grb2(egfr,shc!1,sos!2).SOS(grb2!2).Shc(egfr,grb2!1,p~P)";
  species PLCg_egfr_p_0_p_i_I in cell = 0; PLCg_egfr_p_0_p_i_I is "PLCg(egfr,p~0,p_i~I)";
  species S23 in cell = 0; S23 is "EGF(egfr!1).EGFR(egf!1,egfr,grb2,p~P,plcg,shc!2).Grb2(egfr,shc!3,sos).Shc(egfr!2,grb2!3,p~P)";
  species S24 in cell = 0; S24 is "EGF(egfr!1).EGFR(egf!1,egfr,grb2,p~P,plcg,shc!2).Grb2(egfr,shc!3,sos!4).SOS(grb2!4).Shc(egfr!2,grb2!3,p~P)";
  species S25 in cell = 0; S25 is "EGF(egfr!1).EGFR(egf!1,egfr,grb2,p~0,plcg,shc!2).Grb2(egfr,shc!3,sos).Shc(egfr!2,grb2!3,p~P)";
  species S26 in cell = 0; S26 is "EGF(egfr!1).EGFR(egf!1,egfr,grb2,p~0,plcg,shc!2).Grb2(egfr,shc!3,sos!4).SOS(grb2!4).Shc(egfr!2,grb2!3,p~P)";
  species S27 in cell = 0; S27 is "Grb2(egfr,shc!1,sos).Shc(egfr,grb2!1,p~0)";
  species S28 in cell = 0; S28 is "Grb2(egfr,shc!1,sos!2).SOS(grb2!2).Shc(egfr,grb2!1,p~0)";
  species S29 in cell = 0; S29 is "EGF(egfr!1).EGFR(egf!1,egfr,grb2!2,p~P,plcg,shc).Grb2(egfr!2,shc!3,sos).Shc(egfr,grb2!3,p~P)";
  species S30 in cell = 0; S30 is "EGF(egfr!1).EGFR(egf!1,egfr,grb2!2,p~P,plcg,shc).Grb2(egfr!2,shc!3,sos!4).SOS(grb2!4).Shc(egfr,grb2!3,p~P)";
  species S31 in cell = 0; S31 is "EGF(egfr!1).EGFR(egf!1,egfr,grb2,p~P,plcg,shc!2).Grb2(egfr,shc!3,sos).Shc(egfr!2,grb2!3,p~0)";
  species S32 in cell = 0; S32 is "EGF(egfr!1).EGFR(egf!1,egfr,grb2,p~P,plcg,shc!2).Grb2(egfr,shc!3,sos!4).SOS(grb2!4).Shc(egfr!2,grb2!3,p~0)";
  species S33 in cell = 0; S33 is "EGF(egfr!1).EGF(egfr!2).EGFR(egf!1,egfr,grb2!3,p~P,plcg,shc).EGFR(egf!2,egfr,grb2,p~P,plcg,shc!4).Grb2(egfr!3,shc!5,sos).Shc(egfr!4,grb2!5,p~P)";
  species S34 in cell = 0; S34 is "EGF(egfr!1).EGF(egfr!2).EGFR(egf!1,egfr,grb2!3,p~P,plcg,shc).EGFR(egf!2,egfr,grb2,p~P,plcg,shc!4).Grb2(egfr!3,shc!5,sos!6).SOS(grb2!6).Shc(egfr!4,grb2!5,p~P)";
  species S35 in cell = 0; S35 is "EGF(egfr!1).EGF(egfr!2).EGFR(egf!2,egfr,grb2!3,p~P,plcg,shc).EGFR(egf!1,egfr,grb2,p~0,plcg,shc!4).Grb2(egfr!3,shc!5,sos).Shc(egfr!4,grb2!5,p~P)";
  species S36 in cell = 0; S36 is "EGF(egfr!1).EGF(egfr!2).EGFR(egf!2,egfr,grb2!3,p~P,plcg,shc).EGFR(egf!1,egfr,grb2,p~0,plcg,shc!4).Grb2(egfr!3,shc!5,sos!6).SOS(grb2!6).Shc(egfr!4,grb2!5,p~P)";
  species S37 in cell = 0; S37 is "EGF(egfr!1).EGFR(egf!1,egfr,grb2!2,p~P,plcg,shc).Grb2(egfr!2,shc!3,sos).Shc(egfr,grb2!3,p~0)";
  species S38 in cell = 0; S38 is "EGF(egfr!1).EGFR(egf!1,egfr,grb2!2,p~P,plcg,shc).Grb2(egfr!2,shc!3,sos!4).SOS(grb2!4).Shc(egfr,grb2!3,p~0)";
  species S39 in cell = 0; S39 is "EGF(egfr!1).EGF(egfr!2).EGFR(egf!1,egfr,grb2!3,p~P,plcg,shc).EGFR(egf!2,egfr,grb2,p~P,plcg,shc!4).Grb2(egfr!3,shc!5,sos).Shc(egfr!4,grb2!5,p~0)";
  species S40 in cell = 0; S40 is "EGF(egfr!1).EGF(egfr!2).EGFR(egf!1,egfr,grb2!3,p~P,plcg,shc).EGFR(egf!2,egfr,grb2,p~P,plcg,shc!4).Grb2(egfr!3,shc!5,sos!6).SOS(grb2!6).Shc(egfr!4,grb2!5,p~0)";

  // Parameters:
  r3_k3f = 5;
  r3_k3b = 0.05;
  r4_V4 = 400;
  r4_K4 = 50;
  r14_k14f = 9.5;
  r14_k14b = 0.001;
  r15_k15f = 0.4;
  r15_k15b = 0.9;
  r16_V16 = 40;
  r16_K16 = 290;
  r6_k6f = 1;
  r6_k6b = 0.05;
  r7_k7f = 0.3;
  r7_k7b = 0.006;
  r8_V8 = 0.1;
  r8_K8 = 1000;
  r25_k25f = 1;
  r25_k25b = 0.03;
  Gf_LR = 7;
  Gf_RR = 1.3026;
  Gf_RSh = 4.738971;
  Gf_LRR = 10.8505;
  Gf_LRRL = -15.7;
  Gf_RShP = 10.3939;
  Gf_RG = -0.71;
  Gf_GS = 2.7081;
  Gf_RGS = 0.35;
  Gf_ShG = -4.05066;
  Gf_RShG = -10.3;
  Gf_ShGS = 10;
  Gf_RPL = 1.5;
  Gf_RPLP = 1.9;
  phi = 0.5;
  Ea_LR = 4.3113;
  Ea_RR = 1.4539;
  Ea_RSh = 0.4594;
  Ea_RG = 4.4024;
  Ea_GS = 17.8563;
  Ea_ShG = 1.0559;
  Ea_RPL = 3.2114;
  dummy = 0;
  _v1_local1 = exp(-(Ea_LR + phi*Gf_LR));
  __reverse_v1_local1 = exp(-(Ea_LR + (1 - phi)*(-Gf_LR)));
  _v2_local1 = exp(-(Ea_RR + phi*(-2*Gf_LR + Gf_RR + 2*Gf_LRR + Gf_LRRL)));
  __reverse_v2_local1 = exp(-(Ea_RR + (1 - phi)*(2*Gf_LR + (-(Gf_RR + 2*Gf_LRR + Gf_LRRL)))));
  _v13_local1 = exp(-(Ea_RSh + phi*Gf_RSh));
  _v9_local1 = exp(-(Ea_RG + phi*Gf_RG));
  _v5_local1 = exp(-(Ea_RPL + phi*Gf_RPL));
  __reverse_v13_local1 = exp(-(Ea_RSh + (1 - phi)*(-Gf_RSh)));
  __reverse_v9_local1 = exp(-(Ea_RG + (1 - phi)*(-Gf_RG)));
  __reverse_v12_local1 = exp(-(Ea_GS + (1 - phi)*(Gf_GS + Gf_RGS)));
  __reverse_v5_local1 = exp(-(Ea_RPL + (1 - phi)*(-Gf_RPL)));
  __reverse_v9_local2 = exp(-(Ea_RG + (1 - phi)*(-Gf_RG + (-Gf_RGS))));
  _v12_local1 = exp(-(Ea_GS + phi*(-Gf_GS + (-Gf_RGS))));
  _v13_local2 = exp(-(Ea_RSh + phi*(Gf_RSh + Gf_RShP)));
  _v9_local2 = exp(-(Ea_RG + phi*(Gf_RG + Gf_RGS)));
  _v21_local1 = exp(-(Ea_ShG + phi*Gf_ShG));
  _v21_local2 = exp(-(Ea_ShG + phi*(Gf_ShG + Gf_ShGS)));
  _v13_local3 = exp(-(Ea_RSh + phi*(Gf_RSh + Gf_RShP + Gf_RShG)));
  __reverse_v13_local2 = exp(-(Ea_RSh + (1 - phi)*(-Gf_RSh + (-Gf_RShP))));
  __reverse_v21_local1 = exp(-(Ea_ShG + (1 - phi)*(-Gf_ShG)));
  __reverse_v21_local2 = exp(-(Ea_ShG + (1 - phi)*(-Gf_ShG + (-Gf_ShGS))));
  __reverse_v13_local3 = exp(-(Ea_RSh + (1 - phi)*(-Gf_RSh + (-Gf_RShP) + (-Gf_RShG))));
  _v12_local2 = exp(-(Ea_GS + phi*(-Gf_GS + (-Gf_RGS) + (-Gf_ShGS))));
  __reverse_v12_local2 = exp(-(Ea_GS + (1 - phi)*(Gf_GS + Gf_RGS + Gf_ShGS)));

  // Assignment rules:
  EGF_EGFR2_P := S9 + S10 + S11 + S12 + S14 + S15 + S19 + S23 + S24 + S29 + S30 + S31 + S32 + S33 + S34 + S35 + S36 + S37 + S38 + S39 + S40;
  Shc_P := 0 + Shc_egfr_grb2_p_P;
  EGFRPtotal := 2*S9 + 2*S10 + 2*S11 + 2*S12 + 2*S13 + 2*S14 + 2*S15 + 2*S29 + 4*S30 + 2*S34 + 2*S36 + 2*S38 + 2*S40;
  ShPtotal := Shc_egfr_grb2_p_P + S19 + S20;
  Grb2EGFRtotal := S11 + S14 + S29 + 2*S30 + S34 + S36 + S38 + S40;
  Grb2Shctotal := S20 + S21 + S23 + S24 + S25 + S26 + S29 + S30 + S33 + S34 + S35 + S36;
  PLCg_P := 0 + PLCg_egfr_p_P_p_i_0;
  PLCgPtotal := S15 + PLCg_egfr_p_P_p_i_0;
  fRate3 := r4_V4/(EGF_EGFR2_P + r4_K4);
  fRate15 := r16_V16/(Shc_P + r16_K16);
  fRate7 := r8_V8/(PLCg_P + r8_K8);

  // Reactions:
  R1: EGF_egfr + EGFR_egf_egfr_grb2_p_0_plcg_shc => S7; _v1_local1*EGF_egfr*EGFR_egf_egfr_grb2_p_0_plcg_shc;
  R2: S7 => EGF_egfr + EGFR_egf_egfr_grb2_p_0_plcg_shc; __reverse_v1_local1*S7;
  R3: S7 + S7 => S8; 0.5*_v2_local1*S7*S7;
  R4: S8 => S7 + S7; 2*__reverse_v2_local1*S8;
  R5: S8 => S9; 2*r3_k3f*S8;
  R6: S9 => S8; r3_k3b*S9;
  R7: S9 => S8; fRate3*S9;
  R8: Shc_egfr_grb2_p_0 + S9 => S10; _v13_local1*Shc_egfr_grb2_p_0*S9;
  R9: Grb2_egfr_shc_sos + S9 => S11; _v9_local1*Grb2_egfr_shc_sos*S9;
  R10: PLCg_egfr_p_0_p_i_0 + S9 => S12; _v5_local1*PLCg_egfr_p_0_p_i_0*S9;
  R11: S10 => Shc_egfr_grb2_p_0 + S9; __reverse_v13_local1*S10;
  R12: S10 => S13; r14_k14f*S10;
  R13: S11 => Grb2_egfr_shc_sos + S9; __reverse_v9_local1*S11;
  R14: SOS_grb2 + S11 => S14; __reverse_v12_local1*SOS_grb2*S11;
  R15: S12 => PLCg_egfr_p_0_p_i_0 + S9; __reverse_v5_local1*S12;
  R16: S12 => S15; r6_k6f*S12;
  R17: S13 => S10; r14_k14b*S13;
  R18: S13 => S9 + Shc_egfr_grb2_p_P; r15_k15f*S13;
  R19: S14 => S9 + Grb2_egfr_shc_sos_1_SOS_grb2_1; __reverse_v9_local2*S14;
  R20: S14 => SOS_grb2 + S11; _v12_local1*S14;
  R21: S15 => S12; r6_k6b*S15;
  R22: S15 => S9 + PLCg_egfr_p_P_p_i_0; r7_k7f*S15;
  R23: S9 + Shc_egfr_grb2_p_P => S19; _v13_local2*S9*Shc_egfr_grb2_p_P;
  R24: S9 + Shc_egfr_grb2_p_P => S13; r15_k15b*S9*Shc_egfr_grb2_p_P;
  R25: Shc_egfr_grb2_p_P => Shc_egfr_grb2_p_0; fRate15*Shc_egfr_grb2_p_P;
  R26: S9 + Grb2_egfr_shc_sos_1_SOS_grb2_1 => S14; _v9_local2*S9*Grb2_egfr_shc_sos_1_SOS_grb2_1;
  R27: Grb2_egfr_shc_sos + Shc_egfr_grb2_p_P => S20; _v21_local1*Grb2_egfr_shc_sos*Shc_egfr_grb2_p_P;
  R28: Shc_egfr_grb2_p_P + Grb2_egfr_shc_sos_1_SOS_grb2_1 => S21; _v21_local2*Shc_egfr_grb2_p_P*Grb2_egfr_shc_sos_1_SOS_grb2_1;
  R29: S9 + PLCg_egfr_p_P_p_i_0 => S15; r7_k7b*S9*PLCg_egfr_p_P_p_i_0;
  R30: PLCg_egfr_p_P_p_i_0 => PLCg_egfr_p_0_p_i_0; fRate7*PLCg_egfr_p_P_p_i_0;
  R31: PLCg_egfr_p_P_p_i_0 => PLCg_egfr_p_0_p_i_I; r25_k25f*PLCg_egfr_p_P_p_i_0;
  R32: S9 + S20 => S23; _v13_local3*S9*S20;
  R33: S9 + S21 => S24; _v13_local3*S9*S21;
  R34: S19 => S9 + Shc_egfr_grb2_p_P; __reverse_v13_local2*S19;
  R35: S9 + S20 => S25; r15_k15b*S9*S20;
  R36: S9 + S21 => S26; r15_k15b*S9*S21;
  R37: S20 => S27; fRate15*S20;
  R38: S21 => S28; fRate15*S21;
  R39: S9 + S20 => S29; _v9_local1*S9*S20;
  R40: S9 + S21 => S30; _v9_local2*S9*S21;
  R41: S20 => Grb2_egfr_shc_sos + Shc_egfr_grb2_p_P; __reverse_v21_local1*S20;
  R42: S21 => Shc_egfr_grb2_p_P + Grb2_egfr_shc_sos_1_SOS_grb2_1; __reverse_v21_local2*S21;
  R43: PLCg_egfr_p_0_p_i_I => PLCg_egfr_p_P_p_i_0; r25_k25b*PLCg_egfr_p_0_p_i_I;
  R44: S9 + S27 => S31; _v13_local1*S9*S27;
  R45: S9 + S28 => S32; _v13_local1*S9*S28;
  R46: S9 + S29 => S33; _v13_local3*S9*S29;
  R47: S9 + S30 => S34; _v13_local3*S9*S30;
  R48: S23 => S9 + S20; __reverse_v13_local3*S23;
  R49: S24 => S9 + S21; __reverse_v13_local3*S24;
  R50: S25 => S31; r14_k14b*S25;
  R51: S26 => S32; r14_k14b*S26;
  R52: S25 => S9 + S20; r15_k15f*S25;
  R53: S26 => S9 + S21; r15_k15f*S26;
  R54: S9 + S29 => S35; r15_k15b*S9*S29;
  R55: S9 + S30 => S36; r15_k15b*S9*S30;
  R56: S29 => S37; fRate15*S29;
  R57: S30 => S38; fRate15*S30;
  R58: S9 + S23 => S33; _v9_local1*S9*S23;
  R59: S9 + S24 => S34; _v9_local2*S9*S24;
  R60: S9 + S25 => S35; _v9_local1*S9*S25;
  R61: S9 + S26 => S36; _v9_local2*S9*S26;
  R62: S9 + S27 => S37; _v9_local1*S9*S27;
  R63: S9 + S28 => S38; _v9_local2*S9*S28;
  R64: S29 => S9 + S20; __reverse_v9_local1*S29;
  R65: S30 => S9 + S21; __reverse_v9_local2*S30;
  R66: S30 => SOS_grb2 + S29; _v12_local2*S30;
  R67: SOS_grb2 + S29 => S30; __reverse_v12_local2*SOS_grb2*S29;
  R68: S9 + S37 => S39; _v13_local1*S9*S37;
  R69: S9 + S38 => S40; _v13_local1*S9*S38;
  R70: S31 => S9 + S27; __reverse_v13_local1*S31;
  R71: S32 => S9 + S28; __reverse_v13_local1*S32;
  R72: S33 => S9 + S29; __reverse_v13_local3*S33;
  R73: S34 => S9 + S30; __reverse_v13_local3*S34;
  R74: S31 => S25; r14_k14f*S31;
  R75: S32 => S26; r14_k14f*S32;
  R76: S35 => S39; r14_k14b*S35;
  R77: S36 => S40; r14_k14b*S36;
  R78: S35 => S9 + S29; r15_k15f*S35;
  R79: S36 => S9 + S30; r15_k15f*S36;
  R80: S9 + S31 => S39; _v9_local1*S9*S31;
  R81: S9 + S32 => S40; _v9_local2*S9*S32;
  R82: S33 => S9 + S23; __reverse_v9_local1*S33;
  R83: S34 => S9 + S24; __reverse_v9_local2*S34;
  R84: S35 => S9 + S25; __reverse_v9_local1*S35;
  R85: S36 => S9 + S26; __reverse_v9_local2*S36;
  R86: S37 => S9 + S27; __reverse_v9_local1*S37;
  R87: S38 => S9 + S28; __reverse_v9_local2*S38;
  R88: S34 => SOS_grb2 + S33; _v12_local2*S34;
  R89: S36 => SOS_grb2 + S35; _v12_local2*S36;
  R90: S38 => SOS_grb2 + S37; _v12_local1*S38;
  R91: SOS_grb2 + S33 => S34; __reverse_v12_local2*SOS_grb2*S33;
  R92: SOS_grb2 + S35 => S36; __reverse_v12_local2*SOS_grb2*S35;
  R93: SOS_grb2 + S37 => S38; __reverse_v12_local1*SOS_grb2*S37;
  R94: S39 => S9 + S37; __reverse_v13_local1*S39;
  R95: S40 => S9 + S38; __reverse_v13_local1*S40;
  R96: S39 => S35; r14_k14f*S39;
  R97: S40 => S36; r14_k14f*S40;
  R98: S39 => S9 + S31; __reverse_v9_local1*S39;
  R99: S40 => S9 + S32; __reverse_v9_local2*S40;
  R100: S40 => SOS_grb2 + S39; _v12_local1*S40;
  R101: SOS_grb2 + S39 => S40; __reverse_v12_local1*SOS_grb2*S39;

  // Unit definitions:
  unit substance = item;
end
