// SBML level 2 version 3

model nfkb copy()

  // Compartments:
  compartment cell = 1;

  // Species:
  species S1 in cell = 5/cell; S1 is "TNF()";
  species TNFR_st_i in cell = 335.58304/cell; TNFR_st_i is "TNFR(st~i)";
  species TNFR_st_a in cell = 0; TNFR_st_a is "TNFR(st~a)";
  species IKK_s_I in cell = 55641.65/cell; IKK_s_I is "IKK(s~I)";
  species IKK_s_A in cell = 0; IKK_s_A is "IKK(s~A)";
  species NFkB_IkB_loc_c in cell = 0; NFkB_IkB_loc_c is "NFkB(IkB,loc~c)";
  species NFkB_IkB_loc_n in cell = 0; NFkB_IkB_loc_n is "NFkB(IkB,loc~n)";
  species IkB_NFkB_loc_c in cell = 0; IkB_NFkB_loc_c is "IkB(NFkB,loc~c)";
  species IkB_NFkB_loc_n in cell = 0; IkB_NFkB_loc_n is "IkB(NFkB,loc~n)";
  species S10 in cell = 3585915.1/cell; S10 is "IkB(NFkB!1,loc~c).NFkB(IkB!1,loc~c)";
  species S11 in cell = 0; S11 is "IkB(NFkB!1,loc~n).NFkB(IkB!1,loc~n)";
  species S12 in cell = 0; S12 is "A20()";

  // Parameters:
  LOG_k_b = 0.0352;
  LOG_k_f = -3.0688;
  LOG_k_a = -4.5164;
  LOG_k_4 = -7.4173;
  LOG_k_i1 = -2.057;
  LOG_k_e1 = -5.9334;
  LOG_k_t2a = -8;
  LOG_k_t1a = -7.3178;
  LOG_k_i2 = -4.1089;
  LOG_k_e2 = -10.6289;
  LOG_k_e2a = -3.5859;
  LOG_c_4a = -4.6363;
  LOG_c_5a = -4.6;
  LOG_c_1a = -3.2082;
  LOG_k_a1a = -7;
  LOG_k_d1a = -8;
  LOG_c_3 = -20;
  LOG_c_1 = -20;
  LOG_k_ikk = -20;
  LOG_k_tnfr = -20;
  LOG_TNFRin = 2.5258;
  LOG_IKKin = 4.7454;
  LOG_boundc = 6.5546;
  _InitialConc1 = 10^LOG_TNFRin;
  _InitialConc2 = 10^LOG_IKKin;
  _InitialConc3 = 10^LOG_boundc;

  // Assignment rules:
  TNF := 0 + S1;
  TNFRi := 0 + TNFR_st_i;
  TNFRa := 0 + TNFR_st_a;
  IKKi := 0 + IKK_s_I;
  IKKa := 0 + IKK_s_A;
  cNFkB := 0 + NFkB_IkB_loc_c;
  nNFkB := 0 + NFkB_IkB_loc_n;
  cIkB := 0 + IkB_NFkB_loc_c;
  nIkB := 0 + IkB_NFkB_loc_n;
  cNFkB_IkB := 0 + S10;
  nNFkB_IkB := 0 + S11;
  A20 := 0 + S12;
  k_b := 10^LOG_k_b;
  k_f := 10^LOG_k_f;
  k_a := 10^LOG_k_a;
  k_4 := 10^LOG_k_4;
  k_i1 := 10^LOG_k_i1;
  k_e1 := 10^LOG_k_e1;
  k_t2a := 10^LOG_k_t2a;
  k_t1a := 10^LOG_k_t1a;
  k_i2 := 10^LOG_k_i2;
  k_e2 := 10^LOG_k_e2;
  k_e2a := 10^LOG_k_e2a;
  c_4a := 10^LOG_c_4a;
  c_5a := 10^LOG_c_5a;
  c_1a := 10^LOG_c_1a;
  k_a1a := 10^LOG_k_a1a;
  k_d1a := 10^LOG_k_d1a;
  c_3 := 10^LOG_c_3;
  c_1 := 10^LOG_c_1;
  k_ikk := 10^LOG_k_ikk;
  k_tnfr := 10^LOG_k_tnfr;
  TNFRin := 10^LOG_TNFRin;
  IKKin := 10^LOG_IKKin;
  boundc := 10^LOG_boundc;
  reac6 := 3.3*k_a1a;

  // Reactions:
  R1: S1 + TNFR_st_i => S1 + TNFR_st_a; k_b*S1*TNFR_st_i;
  R2: TNFR_st_a => TNFR_st_i; k_f*TNFR_st_a;
  R3: TNFR_st_a + IKK_s_I => TNFR_st_a + IKK_s_A; k_a*TNFR_st_a*IKK_s_I;
  R4: IKK_s_A => IKK_s_I; k_4*IKK_s_A;
  R5: NFkB_IkB_loc_c + IkB_NFkB_loc_c => S10; k_a1a*NFkB_IkB_loc_c*IkB_NFkB_loc_c;
  R6: S10 => NFkB_IkB_loc_c + IkB_NFkB_loc_c; k_d1a*S10;
  R7: NFkB_IkB_loc_n + IkB_NFkB_loc_n => S11; reac6*NFkB_IkB_loc_n*IkB_NFkB_loc_n;
  R8: S11 => NFkB_IkB_loc_n + IkB_NFkB_loc_n; k_d1a*S11;
  R9: IKK_s_A + IkB_NFkB_loc_c => IKK_s_A; k_t1a*IKK_s_A*IkB_NFkB_loc_c;
  R10: IKK_s_A + S10 => IKK_s_A + NFkB_IkB_loc_c; k_t2a*IKK_s_A*S10;
  R11: IkB_NFkB_loc_c => ; c_4a*IkB_NFkB_loc_c;
  R12: S10 => NFkB_IkB_loc_c; c_5a*S10;
  R13: NFkB_IkB_loc_c => NFkB_IkB_loc_n; k_i1*NFkB_IkB_loc_c;
  R14: NFkB_IkB_loc_n => NFkB_IkB_loc_c; k_e1*NFkB_IkB_loc_n;
  R15: IkB_NFkB_loc_c => IkB_NFkB_loc_n; k_i2*IkB_NFkB_loc_c;
  R16: IkB_NFkB_loc_n => IkB_NFkB_loc_c; k_e2*IkB_NFkB_loc_n;
  R17: NFkB_IkB_loc_n => NFkB_IkB_loc_n + IkB_NFkB_loc_c; c_1a*NFkB_IkB_loc_n;
  R18: S11 => S10; k_e2a*S11;
  R19: NFkB_IkB_loc_n => NFkB_IkB_loc_n + S12; c_1*NFkB_IkB_loc_n;
  R20: IKK_s_A + S12 => IKK_s_I + S12; k_ikk*IKK_s_A*S12;
  R21: TNFR_st_a + S12 => TNFR_st_i + S12; k_tnfr*TNFR_st_a*S12;
  R22: S12 => ; c_3*S12;

  // Unit definitions:
  unit substance = item;
end
