// SBML level 2 version 3

model temp()

  // Compartments:
  compartment cell = 1;

  // Species:
  species S1 in cell = 0; S1 is "TNF()";
  species TNFR_st_i in cell = 10^TNFRin; TNFR_st_i is "TNFR(st~i)";
  species TNFR_st_a in cell = 0; TNFR_st_a is "TNFR(st~a)";
  species IKK_s_I in cell = 10^IKKin; IKK_s_I is "IKK(s~I)";
  species IKK_s_A in cell = 0; IKK_s_A is "IKK(s~A)";
  species NFkB_IkB_loc_c in cell = 0; NFkB_IkB_loc_c is "NFkB(IkB,loc~c)";
  species NFkB_IkB_loc_n in cell = 0; NFkB_IkB_loc_n is "NFkB(IkB,loc~n)";
  species IkB_NFkB_loc_c in cell = 0; IkB_NFkB_loc_c is "IkB(NFkB,loc~c)";
  species IkB_NFkB_loc_n in cell = 0; IkB_NFkB_loc_n is "IkB(NFkB,loc~n)";
  species S10 in cell = 10^boundc; S10 is "IkB(NFkB!1,loc~c).NFkB(IkB!1,loc~c)";
  species S11 in cell = 0; S11 is "IkB(NFkB!1,loc~n).NFkB(IkB!1,loc~n)";
  species S12 in cell = 0; S12 is "A20()";

  // Parameters:
  k_b = 0.0352;
  k_f = -3.0688;
  k_a = -4.5164;
  k_4 = -7.4173;
  k_i1 = -2.057;
  k_e1 = -5.9334;
  k_t2a = -8;
  k_t1a = -7.3178;
  k_i2 = -4.1089;
  k_e2 = -10.6289;
  k_e2a = -3.5859;
  c_4a = -4.6363;
  c_5a = -4.6;
  c_1a = -3.2082;
  k_a1a = -7;
  k_d1a = -8;
  c_3 = -20;
  c_1 = -20;
  k_ikk = -20;
  k_tnfr = -20;
  TNFRin = 2.5258;
  IKKin = 4.7454;
  boundc = 6.5546;
  _rateLaw1 = 10^k_b;
  _rateLaw2 = 10^k_f;
  _rateLaw3 = 10^k_a;
  _rateLaw4 = 10^k_4;
  _rateLaw5 = 10^k_a1a;
  _rateLaw6 = 10^k_d1a;
  _rateLaw7 = 3.3*10^k_a1a;
  _rateLaw8 = 10^k_d1a;
  _rateLaw9 = 10^k_t1a;
  _rateLaw10 = 10^k_t2a;
  _rateLaw11 = 10^c_4a;
  _rateLaw12 = 10^c_5a;
  _rateLaw13 = 10^k_i1;
  _rateLaw14 = 10^k_e1;
  _rateLaw15 = 10^k_i2;
  _rateLaw16 = 10^k_e2;
  _rateLaw17 = 10^c_1a;
  _rateLaw18 = 10^k_e2a;
  _rateLaw19 = 10^c_1;
  _rateLaw20 = 10^k_ikk;
  _rateLaw21 = 10^k_tnfr;
  _rateLaw22 = 10^c_3;

  // Assignment rules:
  TNF := 0 + S1;
  TNFRi := 0 + TNFR_st_i;
  TNFRa := 0 + TNFR_st_a;
  IKKi := 0 + IKK_s_I;
  IKKa := 0 + IKK_s_A;
  cNFkB := 0 + NFkB_IkB_loc_c;
  nNFkB := 0 + NFkB_IkB_loc_n;
  cIkB := 0 + IkB_NFkB_loc_c;
  nIkB := 0 + IkB_NFkB_loc_n;
  cNFkB_IkB := 0 + S10;
  nNFkB_IkB := 0 + S11;
  A20 := 0 + S12;

  // Reactions:
  R1: S1 + TNFR_st_i => S1 + TNFR_st_a; _rateLaw1*S1*TNFR_st_i;
  R2: TNFR_st_a => TNFR_st_i; _rateLaw2*TNFR_st_a;
  R3: TNFR_st_a + IKK_s_I => TNFR_st_a + IKK_s_A; _rateLaw3*TNFR_st_a*IKK_s_I;
  R4: IKK_s_A => IKK_s_I; _rateLaw4*IKK_s_A;
  R5: NFkB_IkB_loc_c + IkB_NFkB_loc_c => S10; _rateLaw5*NFkB_IkB_loc_c*IkB_NFkB_loc_c;
  R6: S10 => NFkB_IkB_loc_c + IkB_NFkB_loc_c; _rateLaw6*S10;
  R7: NFkB_IkB_loc_n + IkB_NFkB_loc_n => S11; _rateLaw7*NFkB_IkB_loc_n*IkB_NFkB_loc_n;
  R8: S11 => NFkB_IkB_loc_n + IkB_NFkB_loc_n; _rateLaw8*S11;
  R9: IKK_s_A + IkB_NFkB_loc_c => IKK_s_A; _rateLaw9*IKK_s_A*IkB_NFkB_loc_c;
  R10: IKK_s_A + S10 => IKK_s_A + NFkB_IkB_loc_c; _rateLaw10*IKK_s_A*S10;
  R11: IkB_NFkB_loc_c => ; _rateLaw11*IkB_NFkB_loc_c;
  R12: S10 => NFkB_IkB_loc_c; _rateLaw12*S10;
  R13: NFkB_IkB_loc_c => NFkB_IkB_loc_n; _rateLaw13*NFkB_IkB_loc_c;
  R14: NFkB_IkB_loc_n => NFkB_IkB_loc_c; _rateLaw14*NFkB_IkB_loc_n;
  R15: IkB_NFkB_loc_c => IkB_NFkB_loc_n; _rateLaw15*IkB_NFkB_loc_c;
  R16: IkB_NFkB_loc_n => IkB_NFkB_loc_c; _rateLaw16*IkB_NFkB_loc_n;
  R17: NFkB_IkB_loc_n => NFkB_IkB_loc_n + IkB_NFkB_loc_c; _rateLaw17*NFkB_IkB_loc_n;
  R18: S11 => S10; _rateLaw18*S11;
  R19: NFkB_IkB_loc_n => NFkB_IkB_loc_n + S12; _rateLaw19*NFkB_IkB_loc_n;
  R20: IKK_s_A + S12 => IKK_s_I + S12; _rateLaw20*IKK_s_A*S12;
  R21: TNFR_st_a + S12 => TNFR_st_i + S12; _rateLaw21*TNFR_st_a*S12;
  R22: S12 => ; _rateLaw22*S12;

  // Unit definitions:
  unit substance = item;
end
