// SBML level 2 version 3

model SVM()

  // Compartments:
  compartment cell = 1;

  // Species:
  species S1 in cell = S0; S1 is "S()";
  species S2 in cell = I0; S2 is "I()";
  species S3 in cell = V0; S3 is "V()";

  // Parameters:
  log_beta = -7;
  log_delta = 0;
  log_pi = 2;
  log_gamma = 1.1760913;
  S0 = 10000000;
  I0 = 1;
  V0 = 6.67;

  // Assignment rules:
  S := 0 + S1;
  I := 0 + S2;
  V := 0 + S3;
  log10_V := log10(V);
  beta := 10^log_beta;
  delta := 10^log_delta;
  pi := 10^log_pi;
  gamma := 10^log_gamma;

  // Reactions:
  R1: S1 + S3 => S2 + S3; beta*S1*S3;
  R2: S2 => ; delta*S2;
  R3: S2 => S2 + S3; pi*S2;
  R4: S3 => ; gamma*S3;

  // Unit definitions:
  unit substance = item;
end
