// SBML level 2 version 3

model Viral_Replication()

  // Compartments:
  compartment cell = 1;

  // Species:
  species S1 in cell = init_nV; S1 is "nV()";
  species S2 in cell = 0; S2 is "R_EB()";
  species S3 in cell = init_EU; S3 is "R_EU()";
  species S4 in cell = 0; S4 is "R_IB()";
  species S5 in cell = 0; S5 is "R_IU()";
  species S6 in cell = init_ribo_tot; S6 is "host_ribo()";
  species S7 in cell = 0; S7 is "translate_complex()";
  species S8 in cell = 0; S8 is "P123()";
  species S9 in cell = 0; S9 is "P1234()";
  species S10 in cell = 0; S10 is "P123_4()";
  species S11 in cell = 0; S11 is "C1234()";
  species S12 in cell = 0; S12 is "posRNA()";
  species S13 in cell = 0; S13 is "dsRNA()";
  species S14 in cell = 0; S14 is "negRNA()";
  species S15 in cell = 0; S15 is "sgRNA()";
  species S16 in cell = 0; S16 is "pos_replicase_4neg()";
  species S17 in cell = 0; S17 is "neg_replicase_4pos()";
  species S18 in cell = 0; S18 is "neg_replicase_4sg()";
  species S19 in cell = 0; S19 is "ds_replicase_4pos()";
  species S20 in cell = 0; S20 is "ds_replicase_4sg()";
  species S21 in cell = 0; S21 is "cyto_posRNA()";
  species S22 in cell = 0; S22 is "cyto_negRNA()";
  species S23 in cell = 0; S23 is "cyto_dsRNA()";
  species S24 in cell = 0; S24 is "sg_translate_complex()";
  species S25 in cell = 0; S25 is "s_poly()";
  species S26 in cell = 0; S26 is "luciferase()";
  species S27 in cell = 0; S27 is "capsid()";
  species S28 in cell = 0; S28 is "rna_capsid()";
  species S29 in cell = 0; S29 is "PE26KE1()";
  species S30 in cell = 0; S30 is "PE26KE1_ER()";
  species S31 in cell = 0; S31 is "PE2_E1()";
  species S32 in cell = 0; S32 is "E2_E1()";
  species S33 in cell = 0; S33 is "assembled()";
  species S34 in cell = 0; S34 is "assembledVLP()";
  species S35 in cell = 0.01/cell; S35 is "PFU()";
  species S36 in cell = 0.01/cell; S36 is "VLP()";

  // Parameters:
  r_bind = 1;
  r_endo = 1;
  r_recycle = 1;
  r_uncoat = 1;
  ka_translate = -3;
  r_translate = 5;
  r_rdrp_cleave = 1;
  r_replicase_cleave = 0;
  r_rna_bind = 1;
  r_rna_out = 0;
  ka_transcribe_pos = 1;
  ka_transcribe_neg_4pos = 1;
  ka_transcribe_neg_4sg = 1;
  r_transcribe = 6;
  r_rna_degrade = 0;
  r_pro_degrade = 0;
  r_sp_cleave = 1;
  r_pro_translocate = 1;
  r_pro_process = 1;
  r_pro_cleave = 1;
  r_capsid_rna_bind = 1;
  r_assemble = 2;
  r_vlp_assemble = 0;
  r_export = 1;
  r_particle_deg = 0;
  ribosome_distance = 3;
  dummy = 0;
  n_struct = 240;
  f_nsp_scale = 0.825;
  init_nV = 5;
  init_EU = 10000;
  init_ribo_tot = 200000;
  length_P123 = 1878;
  length_P1234 = 2494;
  length_s_poly = 1242;
  length_genome = 11704;
  length_sg = 4114;
  _rateLaw1 = 10^r_bind;
  _rateLaw2 = 10^r_endo;
  _rateLaw3 = 10^r_recycle;
  _rateLaw4 = 10^r_uncoat;
  _rateLaw6 = 10^ka_translate;
  _rateLaw10 = 10^r_rdrp_cleave;
  _rateLaw11 = 10^r_replicase_cleave;
  _rateLaw12 = 10^ka_transcribe_pos;
  _rateLaw13 = 10^r_rna_bind;
  _rateLaw14 = 10^ka_transcribe_neg_4pos;
  _rateLaw15 = 10^ka_transcribe_neg_4pos;
  _rateLaw16 = 10^ka_transcribe_neg_4sg;
  _rateLaw17 = 10^ka_transcribe_neg_4sg;
  _rateLaw18 = 10^r_rna_out;
  _rateLaw19 = 10^r_rna_out;
  _rateLaw20 = 10^r_rna_out;
  _rateLaw21 = 10^r_rna_degrade;
  _rateLaw22 = 10^r_rna_degrade;
  _rateLaw23 = 10^r_rna_degrade;
  _rateLaw24 = 10^r_rna_degrade;
  _rateLaw25 = 10^r_rna_degrade;
  _rateLaw26 = 10^r_rna_degrade;
  _rateLaw27 = 10^r_rna_degrade;
  _rateLaw28 = 10^r_pro_degrade;
  _rateLaw29 = 10^r_pro_degrade;
  _rateLaw30 = 10^r_pro_degrade;
  _rateLaw31 = 10^r_pro_degrade;
  _rateLaw32 = 10^r_pro_degrade;
  _rateLaw33 = 10^r_pro_degrade;
  _rateLaw34 = 10^r_pro_degrade;
  _rateLaw35 = 10^r_pro_degrade;
  _rateLaw36 = 10^r_pro_degrade;
  _rateLaw37 = 10^r_pro_degrade;
  _rateLaw38 = 10^r_pro_degrade;
  _rateLaw39 = 10^ka_translate;
  _rateLaw42 = 10^r_sp_cleave;
  _rateLaw43 = 10^r_pro_translocate;
  _rateLaw44 = 10^r_pro_process;
  _rateLaw45 = 10^r_pro_cleave;
  _rateLaw46 = 10^r_capsid_rna_bind;
  _rateLaw47 = 10^r_assemble;
  _rateLaw48 = 10^r_vlp_assemble;
  _rateLaw49 = 10^r_export;
  _rateLaw50 = 10^r_export;
  _rateLaw51 = 10^r_particle_deg;
  _rateLaw52 = 10^r_particle_deg;

  // Assignment rules:
  nV := 0 + S1;
  R_EB := 0 + S2;
  R_EU := 0 + S3;
  R_IB := 0 + S4;
  R_IU := 0 + S5;
  host_ribo := 0 + S6;
  translate_complex := 0 + S7;
  P123 := 0 + S8;
  P1234 := 0 + S9;
  P123_4 := 0 + S10;
  C1234 := 0 + S11;
  posRNA := 0 + S12;
  dsRNA := 0 + S13;
  negRNA := 0 + S14;
  sgRNA := 0 + S15;
  pos_replicase_4neg := 0 + S16;
  neg_replicase_4pos := 0 + S17;
  neg_replicase_4sg := 0 + S18;
  ds_replicase_4pos := 0 + S19;
  ds_replicase_4sg := 0 + S20;
  cyto_posRNA := 0 + S21;
  cyto_negRNA := 0 + S22;
  cyto_dsRNA := 0 + S23;
  sg_translate_complex := 0 + S24;
  s_poly := 0 + S25;
  luciferase := 0 + S26;
  capsid := 0 + S27;
  rna_capsid := 0 + S28;
  PE26KE1 := 0 + S29;
  PE26KE1_ER := 0 + S30;
  PE2_E1 := 0 + S31;
  E2_E1 := 0 + S32;
  assembled := 0 + S33;
  assembledVLP := 0 + S34;
  PFU := 0 + S35;
  VLP := 0 + S36;
  allNsp := P123 + P1234 + P123_4 + C1234 + pos_replicase_4neg + neg_replicase_4pos + neg_replicase_4sg + ds_replicase_4pos + ds_replicase_4sg;
  allSp := s_poly + luciferase;
  allPos := translate_complex + posRNA + pos_replicase_4neg + dsRNA + ds_replicase_4pos + ds_replicase_4sg + cyto_dsRNA + cyto_posRNA + rna_capsid;
  allNeg := negRNA + dsRNA + cyto_dsRNA + ds_replicase_4pos + ds_replicase_4sg + neg_replicase_4pos + neg_replicase_4sg + cyto_negRNA;
  allSg := sgRNA + sg_translate_complex;
  allPfu := nV + PFU;
  n_ribo_g := length_genome/10^ribosome_distance;
  n_ribo_sg := length_sg/10^ribosome_distance;
  translate_P123 := f_nsp_scale*(n_ribo_g*10^r_translate/length_P123);
  translate_P1234 := (1 - f_nsp_scale)*(n_ribo_g*10^r_translate/length_P1234);
  translate_s := n_ribo_sg*10^r_translate/(length_s_poly*n_struct);
  transcribe_full := 10^r_transcribe/length_genome;
  transcribe_sg := 10^r_transcribe/length_sg;
  _rateLaw5 := 10^r_uncoat*n_ribo_g;
  _rateLaw7 := 10^ka_translate*n_ribo_g;
  _rateLaw8 := translate_P123*n_ribo_g;
  _rateLaw9 := translate_P1234*n_ribo_g;
  _rateLaw40 := 10^ka_translate*n_ribo_sg;
  _rateLaw41 := translate_s*n_ribo_sg;

  // Reactions:
  R1: S1 + S3 => S2; _rateLaw1*S1*S3;
  R2: S2 => S4; _rateLaw2*S2;
  R3: S5 => S3; _rateLaw3*S5;
  R4: S4 + S6 => S5 + S6 + S7; _rateLaw4*S4*S6;
  R5: S4 + S6 => S4; _rateLaw5*S4*S6;
  R6: S6 + S12 => S6 + S7; _rateLaw6*S6*S12;
  R7: S6 + S12 => S12; _rateLaw7*S6*S12;
  R8: S7 => S8 + S12; translate_P123*S7;
  R9: S7 => S6 + S7; _rateLaw8*S7;
  R10: S7 => S9 + S12; translate_P1234*S7;
  R11: S7 => S6 + S7; _rateLaw9*S7;
  R12: S9 => S10; _rateLaw10*S9;
  R13: S10 => S11; _rateLaw11*S10;
  R14: S10 + S12 => S16; _rateLaw12*S10*S12;
  R15: S16 => S10 + S12 + S14; transcribe_full*S16;
  R16: S12 + S14 => S13; _rateLaw13*S12*S14;
  R17: S11 + S14 => S17; _rateLaw14*S11*S14;
  R18: S11 + S13 => S19; _rateLaw15*S11*S13;
  R19: S17 => S11 + S12 + S14; transcribe_full*S17;
  R20: S19 => S11 + S12 + S12 + S14; transcribe_full*S19;
  R21: S11 + S14 => S18; _rateLaw16*S11*S14;
  R22: S11 + S13 => S20; _rateLaw17*S11*S13;
  R23: S18 => S11 + S14 + S15; transcribe_sg*S18;
  R24: S20 => S11 + S12 + S14 + S15; transcribe_sg*S20;
  R25: S13 => S23; _rateLaw18*S13;
  R26: S12 => S21; _rateLaw19*S12;
  R27: S14 => S22; _rateLaw20*S14;
  R28: S12 => ; _rateLaw21*S12;
  R29: S14 => ; _rateLaw22*S14;
  R30: S13 => ; _rateLaw23*S13;
  R31: S15 => ; _rateLaw24*S15;
  R32: S21 => ; _rateLaw25*S21;
  R33: S22 => ; _rateLaw26*S22;
  R34: S23 => ; _rateLaw27*S23;
  R35: S8 => ; _rateLaw28*S8;
  R36: S9 => ; _rateLaw29*S9;
  R37: S10 => ; _rateLaw30*S10;
  R38: S11 => ; _rateLaw31*S11;
  R39: S25 => ; _rateLaw32*S25;
  R40: S27 => ; _rateLaw33*S27;
  R41: S29 => ; _rateLaw34*S29;
  R42: S30 => ; _rateLaw35*S30;
  R43: S31 => ; _rateLaw36*S31;
  R44: S32 => ; _rateLaw37*S32;
  R45: S26 => ; _rateLaw38*S26;
  R46: S6 + S15 => S6 + S24; _rateLaw39*S6*S15;
  R47: S6 + S15 => S15; _rateLaw40*S6*S15;
  R48: S24 => S15 + S25; translate_s*S24;
  R49: S24 => S6 + S24; _rateLaw41*S24;
  R50: S25 => S26 + S27 + S29; _rateLaw42*S25;
  R51: S29 => S30; _rateLaw43*S29;
  R52: S30 => S31; _rateLaw44*S30;
  R53: S31 => S32; _rateLaw45*S31;
  R54: S21 + S27 => S28; _rateLaw46*S21*S27;
  R55: S28 + S32 => S33; _rateLaw47*S28*S32;
  R56: S27 + S32 => S34; _rateLaw48*S27*S32;
  R57: S33 => S35; _rateLaw49*S33;
  R58: S34 => S36; _rateLaw50*S34;
  R59: S35 => ; _rateLaw51*S35;
  R60: S36 => ; _rateLaw52*S36;

  // Unit definitions:
  unit substance = item;
end
