// SBML level 2 version 3

model mRNAlog()

  // Compartments:
  compartment cell = 1;

  // Species:
  species S1 in cell = mRNA0; S1 is "mRNA()";
  species S2 in cell = p10; S2 is "p1()";
  species S3 in cell = 0; S3 is "p2()";

  // Parameters:
  log_param0 = 1;
  log_param1 = -0.301;
  log_param2 = 1;
  log_param3 = 0.3031;
  log_param4 = 0;
  mRNA0 = 10;
  p10 = 5;

  // Assignment rules:
  mRNA := 0 + S1;
  p1 := 0 + S2;
  p2 := 0 + S3;
  param0 := 10^log_param0;
  param1 := 10^log_param1;
  param2 := 10^log_param2;
  param3 := 10^log_param3;
  param4 := 10^log_param4;
  tomRNA := p1*param2;
  frommRNA := p2*param3;

  // Reactions:
  R1: => S1; tomRNA;
  R2: S1 => ; frommRNA*S1;
  R3: S1 => ; param4*S1;
  R4: S1 => S2; param0*S1;
  R5: S2 => S3; param1*S2;
  R6: S2 => ; param4*S2;
  R7: S3 => ; param4*S3;

  // Unit definitions:
  unit substance = item;
end
