// SBML level 2 version 3

model mRNA_self_reg()

  // Compartments:
  compartment cell = 1;

  // Species:
  species S1 in cell = 10/cell; S1 is "mRNA()";
  species S2 in cell = 5/cell; S2 is "p1()";
  species S3 in cell = 0; S3 is "p2()";

  // Parameters:
  log_param0 = 1;
  log_param1 = -0.30103;
  log_param2 = 1;
  log_param3 = 0.30103;
  dummy = 0;
  log_param4 = 0;
  _rateLaw3 = 10^log_param4;
  _rateLaw4 = 10^log_param0;
  _rateLaw5 = 10^log_param1;
  _rateLaw6 = 10^log_param4;
  _rateLaw7 = 10^log_param4;

  // Assignment rules:
  mRNA := 0 + S1;
  p1 := 0 + S2;
  p2 := 0 + S3;
  _rateLaw1 := p1*10^log_param2;
  _rateLaw2 := p2*10^log_param3;

  // Reactions:
  R1: => S1; _rateLaw1;
  R2: S1 => ; _rateLaw2*S1;
  R3: S1 => ; _rateLaw3*S1;
  R4: S1 => S2; _rateLaw4*S1;
  R5: S2 => S3; _rateLaw5*S2;
  R6: S2 => ; _rateLaw6*S2;
  R7: S3 => ; _rateLaw7*S3;

  // Unit definitions:
  unit substance = item;
end
